*Heading
** Job name: JobRefinex1 Model name: PlateEllipticHolesRefinex1
** Generated by: Abaqus/CAE 2021
*Preprint, echo=NO, model=NO, history=NO, contact=NO
**
** PARTS
**
*Part, name=PlateEllipticHolesPart1
*Node
      1,        0.375,        0.625
      2,        0.375,           1.
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*Element, type=CPS4R
  1,   1,  23, 442,  90
  2,  23,  24, 443, 442
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*Nset, nset=Set-1, generate
    1,  2179,     1
*Elset, elset=Set-1, generate
    1,  2022,     1
** Section: Section-1
*Solid Section, elset=Set-1, material=Steel
,
*End Part
**
**
** ASSEMBLY
**
*Assembly, name=Assembly
**
*Instance, name=PlateEllipticHolesPart1-1, part=PlateEllipticHolesPart1
*End Instance
**
*End Assembly
**
** MATERIALS
**
*Material, name=Steel
*Elastic
210., 0.3
** ----------------------------------------------------------------
**
** STEP: Step-1
**
*Step, name=Step-1, nlgeom=NO
*Static
1., 1., 1e-05, 1.
**
** BOUNDARY CONDITIONS
**
** Name: BC-1 Type: Symmetry/Antisymmetry/Encastre
*Boundary
Set-1, ENCASTRE
**
** LOADS
**
** Name: Load-1   Type: Pressure
*Dsload
Surf-1, P, 1.
**
** OUTPUT REQUESTS
**
*Restart, write, frequency=0
**
** FIELD OUTPUT: F-Output-1
**
*Output, field, variable=PRESELECT
**
** HISTORY OUTPUT: H-Output-1
**
*Output, history, variable=PRESELECT
*End Step
